<?xml version="1.0"?>

<Node name="root" gravity="0 0 0" dt="0.02" >
    <RequiredPlugin name="SofaOpenglVisual"/>
    <VisualStyle displayFlags="showVisualModels" />

    <RequiredPlugin pluginName="Sensable" />

    <FreeMotionAnimationLoop />
    <GenericConstraintSolver />

    <CollisionPipeline depth="8" />
    <BruteForceDetection name="N2" />
    <LocalMinDistance name="Proximity" alarmDistance="0.6" contactDistance="0.3" />
    <RuleBasedContactManager name="Response" response="FrictionContact"
                             rules="1 * FrictionContact?mu=0.01
                                    " />

    <DefaultVisualManagerLoop />

    <Node name="OmniObject">
        <Node name="RigidLayer">
            <MechanicalObject name="ToolRealPosition" tags="Omni" template="Rigid" />
            <NewOmniDriver name="omniDriver1" tags="Omni" scale="300" permanent="true" listening="true" alignOmniWithCamera="true"/>
            <Node name="Tool1">
                <MechanicalObject template="Rigid" name="RealPosition"/>
                <SubsetMapping indices="0"/>
            </Node>
        </Node>
    </Node>

    <Node name="Tool">
        <EulerImplicit />
        <CGLinearSolver />

        <MechanicalObject name="ms" template="Rigid"/>
        <UniformMass totalmass="0.1" />
        <LCPForceFeedback activate="true" tags="Omni" forceCoef="0.001" />

        <Node name="ToolCollision">
            <MechanicalObject name="CM" position="0 0 0"/>
            <PointCollisionModel bothSide="true" group="1" />
            <RigidMapping />
        </Node>

        <Node name="ToolVisual">
            <OglModel template="ExtVec3f" name="VisualModel" fileMesh="data/mesh/dental_instrument.obj" scale3d="10 10 10" translation="-2.12256 1.32361 35.5" rotation="180 0 150" />
            <RigidMapping template="Rigid,ExtVec3f" name="MM->VM mapping" input="@ms" output="@VisualModel" />
        </Node>


        <RestShapeSpringsForceField template="Rigid" stiffness="1000000" angularStiffness="200000000" external_rest_shape="../OmniObject/RigidLayer/Tool1/RealPosition" />
        <UncoupledConstraintCorrection compliance="0.001   0.00003 0 0   0.00003 0   0.00003" />
    </Node>

<Node name="Box" >
        <Node name="VisualModel" >
            <OglModel template="ExtVec3f" name="BoxVisualModel" scale3d="10 10 10" fileMesh="data/mesh/box.obj" />
        </Node>
        <Node 	name="CollisionModel" >

            <MeshObjLoader name="loader"  filename="data/mesh/box.obj" scale="10"/>
            <MeshTopology src="@loader" name="BoxCollisionModel" />
            <MechanicalObject src="@loader" template="Vec3d" name="boxState" />
            <TriangleCollisionModel />

        </Node>
    </Node>

</Node>
