<?xml version="1.0" ?>
<Node name="root" dt="0.02" gravity="0 0 -10">
    <VisualStyle displayFlags="showBehaviorModels showCollisionModels" />
    <CollisionPipeline depth="6" verbose="0" draw="0" />
    <BruteForceDetection name="N2" />
    <MinProximityIntersection name="Proximity" alarmDistance="0.5" contactDistance="0.3" />
    <CollisionResponse name="Response" response="default" />
    <CollisionGroup name="Group" />
    <RequiredPlugin name="SurfLabHexahedralIGA" />
    <OglSceneFrame />
    <Node name="M1">
        <TricubicBezierSetTopologyContainer fromHexahedra="0 1 2 3 4 5 6 7" fromHexahedralPoints="-1 -1 -1  +1 -1 -1  -1 +1 -1  +1 +1 -1   -1 -1 +1  +1 -1 +1  -1 +1 +1  +1 +1 +1 " />
        <EulerImplicit name="cg_odesolver" printLog="false" />
        <CGLinearSolver iterations="25" name="linear solver" tolerance="1.0e-9" threshold="1.0e-9" />
        <MechanicalObject name="MO" />
        <UniformMass mass="1" />
        <BoxConstraint box="-1 -1 .9 1 1 1" />
        <Line />
        <Point />
        <TricubicBezierForceField name="FEM" youngModulus="1000" poissonRatio="0.45" rayleighStiffness="0" />
        <OglModel name="Visual" />
        <IdentityMapping input="@MO" output="@Visual" />
    </Node>
</Node>
