<?xml version="1.0" ?>
<Node name="root" dt="0.02" gravity="0 0 -10">
    <VisualStyle displayFlags="showBehaviorModels showCollisionModels" />
    <CollisionPipeline depth="6" verbose="0" draw="0" />
    <BruteForceDetection name="N2" />
    <MinProximityIntersection name="Proximity" alarmDistance="0.5" contactDistance="0.3" />
    <CollisionResponse name="Response" response="default" />
    <CollisionGroup name="Group" />
    <RequiredPlugin name="SurfLabHexahedralIGA" />
    <OglSceneFrame />
    <Node name="M1">
        <RegularGrid nx="4" ny="4" nz="4" xmin="-1" ymin="-1" zmin="-1" xmax="1" ymax="1" zmax="1" />
        <EulerImplicit name="cg_odesolver" printLog="false" />
        <CGLinearSolver iterations="25" name="linear solver" tolerance="1.0e-9" threshold="1.0e-9" />
        <MechanicalObject name="MO" />
        <UniformMass mass="1" />
        <BoxConstraint box="-1 -1 .9 1 1 1" />
        <Line />
        <Point />
<!--         <TrilinearHexahedralCorotationalFEMForceField name="FEM" youngModulus="1000" poissonRatio="0.45" rayleighStiffness="0"/> -->
         <HexahedronFEMForceField name="FEM" youngModulus="1000" poissonRatio="0.45" rayleighStiffness="0"/>
        <OglModel name="Visual" />
        <IdentityMapping input="@MO" output="@Visual" />
    </Node>
</Node>
