<Node name="root" dt="0.02" gravity="0 -10 0">
<RequiredPlugin name="SurfLabSplineSurface" />
<VisualStyle displayFlags="showBehaviorModels " />
<CollisionPipeline depth="6" verbose="0" draw="0" />
<BruteForceDetection name="N2" />
<MinProximityIntersection name="Proximity" alarmDistance="0.5" contactDistance="0.3" />
<CollisionResponse name="Response" response="default" />
<CollisionGroup name="Group" />
<RequiredPlugin name="SurfLabHexahedralIGA" />
<Node name="M1">
    <EulerImplicit name="cg_odesolver" printLog="false" />
    <CGLinearSolver iterations="25" name="linear solver" tolerance="1.0e-9" threshold="1.0e-9" />
    <MechanicalObject />
    <UniformMass mass="1" />
    <RegularGrid name="Container" nx="4" ny="4" nz="20" xmin="-9" xmax="-6" ymin="0" ymax="3" zmin="0" zmax="19" />
    <FixedConstraint indices="0 1 2 3 4 5 6 7 8 9 10 11 12 13 14 15" />
    <HexahedronFEMForceField name="FEM" youngModulus="4000" poissonRatio="0.4"  />
    <Triangle />
    <Line />
    <Point />
    <Node name="visualNode">
        <QuadSetTopologyContainer name="Container"/>
        <QuadSetTopologyModifier/>
        <QuadSetTopologyAlgorithms/>
        <QuadSetGeometryAlgorithms/>
        <Hexa2QuadTopologicalMapping input="@../Container" output="@Container" />
        <BiCubicSplineSurface tesselationFactor="4"/>
    </Node>
</Node>


<!-- <Node author-order="1" author-parent="root" name="Cube">
<OglModel name="Cube-visual" normal="-0.577349185944 -0.577349185944 -0.577349185944 -0.577349185944 -0.577349185944 0.577349185944 -0.577349185944 0.577349185944 -0.577349185944 -0.577349185944 0.577349185944 0.577349185944 0.577349185944 -0.577349185944 -0.577349185944 0.577349185944 -0.577349185944 0.577349185944 0.577349185944 0.577349185944 -0.577349185944 0.577349185944 0.577349185944 0.577349185944 " position="-1.0 -1.0 -1.0 -1.0 -1.0 1.0 -1.0 1.0 -1.0 -1.0 1.0 1.0 1.0 -1.0 -1.0 1.0 -1.0 1.0 1.0 1.0 -1.0 1.0 1.0 1.0 " quads="1 3 2 0  3 7 6 2  7 5 4 6  5 1 0 4  0 2 6 4  5 7 3 1  " rotation="0.0 0.0 0.0 " scale3d="0.37076422572135925 0.37076422572135925 0.37076422572135925 " translation="3.8945062160491943 -0.9286313056945801 -0.518194317817688 " triangles="" />
<TriangleSetTopologyContainer edges="0 1 1 3 3 2 2 0 3 7 7 6 6 2 7 5 5 4 4 6 5 1 0 4 3 0 7 2 5 6 1 4 2 4 7 1 " position="-1.0 -1.0 -1.0 -1.0 -1.0 1.0 -1.0 1.0 -1.0 -1.0 1.0 1.0 1.0 -1.0 -1.0 1.0 -1.0 1.0 1.0 1.0 -1.0 1.0 1.0 1.0 " triangles="3 2 0 7 6 2 5 4 6 1 0 4 2 6 4 7 3 1 1 3 0 3 7 2 7 5 6 5 1 4 0 2 4 5 7 1 " />
<MechanicalObject name="MO" rotation="0.0 0.0 0.0 " scale3d="0.37076422572135925 0.37076422572135925 0.37076422572135925 " template="Vec3d" translation="3.8945062160491943 -0.9286313056945801 -0.518194317817688 " />
<PointModel bothSide="0" contactFriction="500.0" contactStiffness="500.0" group="1" moving="0" selfCollision="0" simulated="0" />
<LineModel bothSide="0" contactFriction="500.0" contactStiffness="500.0" group="1" moving="0" selfCollision="0" simulated="0" />
<TriangleModel bothSide="0" contactFriction="500.0" contactStiffness="500.0" group="1" moving="0" selfCollision="0" simulated="0" tags="HapticSurface" />
<!-- <BiCubicSplineSurface tesselationFactor="16"/> -->
<UncoupledConstraintCorrection />
</Node> -->
</Node>
